<Lems>

<ComponentType name="DisplayList">
    <Parameter name="timeScale" Dimension="time"/>
    <Children name="lines" type="Line"/>

    <Text name="title"/>
    <Text name="display"/>
</ComponentType>

<ComponentType name="Display">
    <Text name="title"/>
	<Parameter name="xmin" dimension="none"/>
	<Parameter name="xmax" dimension="none"/>
	<Parameter name="ymin" dimension="none"/>
	<Parameter name="ymax" dimension="none"/>

    <Behavior>
         <DataDisplay title="title" dataRegion="xmin,xmax,ymin,ymax"/>
    </Behavior>
</ComponentType>

<ComponentType name="Line">
    <Parameter name="scale" Dimension="*"/>
	 <Parameter name="timeScale" Dimension="*"/>
    <Text name="color"/>
    <Text name="save"/>
    <Path name="quantity"/>
    <Behavior>
        <Record quantity="quantity" timeScale="timeScale" scale="scale" color="color" display="display"/>
    </Behavior>
</ComponentType>

<ComponentType name="Simulation">
    <Parameter name="length" dimension="time"/>
    <Parameter name="step" dimension="time"/>
    <ComponentRef name="target" type="Component"/>
    <Link name="display" type="Display"/>
    <Children name="outputs" type="DisplayList"/>
    <Behavior>
        <StateVariable name="t" dimension="time"/>
        <Run component="target" variable="t" increment="step" total="length"/>
      </Behavior>
</ComponentType>

<ComponentType name="SimulationSet">
    <Children name="simulations" type="Simulation"/>
    <Children name="displays" type="Display"/>

    <Behavior>
        <Run simulations="simulations"/>
    </Behavior>

</ComponentType>

</Lems>
