<Lems>

    <Target component="simset"/>

    <Dimension name="voltage" m="1" l="2" t="-3" i="-1"/>
    <Dimension name="time" t="1"/>
    <Dimension name="per_time" t="-1"/>
    <Dimension name="conductance" m="-1" l="-2" t="3" i="2"/>
    <Dimension name="capacitance" m="-1" l="-2" t="4" i="2"/>
    <Dimension name="current" i="1"/>

    <Unit symbol="mV" dimension="voltage" power="-3"/>
    <Unit symbol="ms" dimension="time" power="-3"/>
    <Unit symbol="pS" dimension="conductance" power="-12"/>
    <Unit symbol="nS" dimension="conductance" power="-9"/>
    <Unit symbol="uF" dimension="capacitance" power="-6"/>
    <Unit symbol="nF" dimension="capacitance" power="-9"/>
    <Unit symbol="pF" dimension="capacitance" power="-12"/>
    <Unit symbol="per_ms" dimension="per_time" power="3"/>
    <Unit symbol="pA" dimension="current" power="-12"/>

    <ComponentType name="iaf3">
        <Parameter name="threshold" dimension="voltage"/>
        <Parameter name="capacitance" dimension="capacitance"/>
        <Parameter name="leakConductance" dimension="conductance"/>
        <Parameter name="leakReversal" dimension="voltage"/>
        <Parameter name="onset" dimension="time"/>
        <Parameter name="vreset" dimension="voltage"/>
        <Exposure name="v" dimension="voltage"/>

        <Dynamics>
            <StateVariable name="v" exposure="v" dimension="voltage"/>

            <OnCondition test="v .gt. threshold .and. t .gt. onset">
                <StateAssignment variable="v" value="vreset"/>
            </OnCondition>

            <TimeDerivative variable="v" value="leakConductance * (leakReversal - v) / capacitance"/>

        </Dynamics>

    </ComponentType>

    <Component id="iaf3cpt" type="iaf3" leakReversal="20mV"  threshold="-30mV" leakConductance="100pS"
           vreset="-80mV" capacitance="1pF" onset="50ms"/>

    <Include file="SimpleNetwork.xml"/>

    <Network id="net1">
        <Population id="p3" component="iaf3cpt" size="1"/>
    </Network>

    <Include file="MultiRunSimulation.xml"/>

    <SimulationSet id="simset">
        <Display id="disp1" title="Example1" xmin="0" xmax="80" ymin="-80" ymax="50"/>

        <Simulation id="sim1" length="80ms" step="0.05ms" target="net1" display="disp1">
            <DisplayList timeScale="1ms" title="Example 1: Dimensions, Units, ComponentTypes and Components">
                <Line id="p3v" quantity="p3[0]/v" scale="1mV" timeScale="1ms" color="#0000f0"/>
            </DisplayList>
        </Simulation>
    </SimulationSet>

</Lems>
