<Lems>

    <!-- Example with Simple Integrate and Fire cell -->

    <!-- Specify which component to run -->
    <Target component="sim1" />

    <!-- Include core NeuroML2 ComponentType definitions -->

    <ComponentType name="baseCell"
        description="Base type of any cell which can be used in a population">

    </ComponentType>

    <ComponentType name="iafTauRefCell"
        description="Integrate and fire cell which returns to its leak reversal potential of _leakReversal with a time course _tau. It has a refractory period of _refract after spiking">

        <Parameter name="thresh" dimension="voltage" description="The membrane potential at which to emit a spiking event and reset voltage"/>
        <Parameter name="reset" dimension="voltage" description="The value the membrane potential is reset to on spiking"/>
        <Parameter name="leakReversal" dimension="voltage"/>
        <Parameter name="tau" dimension="time"/>
        <Parameter name="refract" dimension="time"/>

        <EventPort name="spike" direction="out" description="Spike event"/>

        <Exposure name="v" dimension="voltage" description="Membrane potential"/>

        <Dynamics>
            <StateVariable name="v" exposure="v" dimension="voltage"/>
            <StateVariable name="lastSpikeTime" dimension="time"/>

            <OnStart>
                <StateAssignment variable="v" value="reset"/>
            </OnStart>

            <Regime name="refractory">
                <OnEntry>
                    <StateAssignment variable="lastSpikeTime" value="t" />
                    <StateAssignment variable="v" value="reset" />
                </OnEntry>
                <OnCondition test="t .gt. lastSpikeTime + refract">
                    <Transition regime="integrating" />
                </OnCondition>
            </Regime>

            <Regime name="integrating" initial="true">
                <TimeDerivative variable="v" value="(leakReversal - v) / tau" />
                <OnCondition test="v .gt. thresh">
                    <EventOut port="spike"/>
                    <Transition regime="refractory" />
                </OnCondition>

            </Regime>

        </Dynamics>

    </ComponentType>

    <Include file="SimpleNetwork.xml" />

    <Include file="SingleSimulation.xml" />

    <Dimension name="time" t="1"/>
    <Dimension name="per_time" t="-1"/>

    <Dimension name="voltage"     m="1" l="2" t="-3" i="-1"/>
    <Dimension name="per_voltage" m="-1" l="-2" t="3" i="1"/>

    <Unit symbol="ms" dimension="time" power="-3"/>                <!-- Physiological Units -->

    <Unit symbol="mV" dimension="voltage" power="-3"/>             <!-- Physiological Units -->

    <!-- Main NeuroML2 content -->
    <iafTauRefCell id="iafTauRef" leakReversal="-70mV" thresh="-55mV"
                   reset="-75mV" tau="30ms" refract="25ms"/>

    <Network id="net1">
        <Population id="iafTauRefPop" component="iafTauRef" size="1" />
    </Network>

    <!-- End of NeuroML2 content -->

    <Simulation id="sim1" length="300ms" step="0.01ms" target="net1">
        <Display id="d0" title="Ex0: Simple Integrate and Fire cells in LEMS" timeScale="1ms" xmin="0" xmax="300" ymin="-80" ymax="-50">
            <Line id="iafTauRefCell" quantity="iafTauRefPop[0]/v" scale="1mV" color="#D7DF01" timeScale="1ms" />
        </Display>
    </Simulation>

</Lems>
